*Heading
** Job name: FE_PS_SSP_UT_fur0_m25 Model name: Model-1
** Generated by: Abaqus/CAE 2021
*Preprint, echo=NO, model=NO, history=NO, contact=NO
**
** PARTS
**
*Part, name=FE_PS_SSP_UT_fur0_m25
*Node
      1,  -8.65235996,  -8.70769024,   6.72249985
      2,  -8.65235996,   8.71111965,   6.72249985
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*Element, type=C3D8R
 1,  72, 321, 345,  65,   1,  41,  52,   4
 2, 321, 322, 346, 345,  41,  42,  51,  52
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*Nset, nset=FE
    3,    4,    6,    7,   11,   12
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*Elset, elset=FE, generate
 406,  845,    1
*Nset, nset=BD
   1,   2,   3,   4,   5,   6
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*Elset, elset=BD
   1,   2,   3,   4,   5,   6
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*Nset, nset=MD
    1,    2,    5,    8,    9,   10
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*Elset, elset=MD, generate
  71,  315,    1
*Nset, nset=DSPL_1
  25,  26,  27,  28,  34,  36
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*Elset, elset=DSPL_1
 415, 416, 417, 418, 419, 420
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*Nset, nset=DSPL_2
  29,  30,  31,  32,  33,  35
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*Elset, elset=DSPL_2
 497, 499, 501, 503, 505, 507
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*Nset, nset=BOUN_1
 644,
*Nset, nset=BOUN_2
 636,
*End Part
**
**
** ASSEMBLY
**
*Assembly, name=Assembly
**
*Instance, name=FE_PS_SSP_UT_fur0_m25_1, part=FE_PS_SSP_UT_fur0_m25
*End Instance
**
*End Assembly
**
** BOUNDARY CONDITIONS
**
** Name: BOUN_1 Type: Displacement/Rotation
*Boundary
FE_PS_SSP_UT_fur0_m25_1.BOUN_1, 2, 2
FE_PS_SSP_UT_fur0_m25_1.BOUN_1, 3, 3
** Name: BOUN_2 Type: Displacement/Rotation
*Boundary
FE_PS_SSP_UT_fur0_m25_1.BOUN_2, 2, 2
** ----------------------------------------------------------------
**
** STEP: FE_PS_SSP_UT_fur0_m25
**
*Step, name=FE_PS_SSP_UT_fur0_m25, nlgeom=NO
*Static
1., 1., 1e-05, 1.
**
** BOUNDARY CONDITIONS
**
** Name: DSPL_1 Type: Displacement/Rotation
*Boundary
FE_PS_SSP_UT_fur0_m25_1.DSPL_1, 1, 1, 15.
** Name: DSPL_2 Type: Displacement/Rotation
*Boundary
FE_PS_SSP_UT_fur0_m25_1.DSPL_2, 1, 1, -15.
**
** OUTPUT REQUESTS
**
*Restart, write, frequency=0
**
** FIELD OUTPUT: F-Output-1
**
*Output, field, variable=PRESELECT
**
** HISTORY OUTPUT: H-Output-1
**
*Output, history, variable=PRESELECT
*End Step
