*Heading
** Job name: FE_equil_dpd30A Model name: Model-1
** Generated by: Abaqus/CAE 2021
*Preprint, echo=NO, model=NO, history=NO, contact=NO
**
** PARTS
**
*Part, name=FE_equil_dpd30A
*Node
      1,  -14.0537004,  -14.0536003,   6.75804996
      2,  -14.0537004,   14.0586004,   6.75804996
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*Element, type=C3D8R
 1,  80, 345, 377,  73,   1,  41,  56,   4
 2, 345, 346, 378, 377,  41,  42,  55,  56
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*Nset, nset=FE
   3,   4,   6,   7,  11,  12
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*Elset, elset=FE, generate
 606,  845,    1
*Nset, nset=BD
   1,   2,   3,   4,   5,   6
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*Elset, elset=BD
   1,   2,   3,   4,   5,   6
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*Nset, nset=MD
    1,    2,    5,    8,    9,   10
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*Elset, elset=MD, generate
  91,  495,    1
*Nset, nset=BOUN_1
 769,
*Nset, nset=BOUN_2
 759,
*Nset, nset=BOUN_3
 902,
*End Part
**
**
** ASSEMBLY
**
*Assembly, name=Assembly
**
*Instance, name=FE_equil_dpd30A_1, part=FE_equil_dpd30A
*End Instance
**
*End Assembly
**
** BOUNDARY CONDITIONS
**
** Name: BOUN_1 Type: Displacement/Rotation
*Boundary
FE_equil_dpd30A_1.BOUN_1, 2, 2
FE_equil_dpd30A_1.BOUN_1, 3, 3
** Name: BOUN_2 Type: Displacement/Rotation
*Boundary
FE_equil_dpd30A_1.BOUN_2, 2, 2
** Name: BOUN_3 Type: Displacement/Rotation
*Boundary
FE_equil_dpd30A_1.BOUN_3, 1, 1
FE_equil_dpd30A_1.BOUN_3, 3, 3
** ----------------------------------------------------------------
**
** STEP: FE_equil_dpd30A
**
*Step, name=FE_equil_dpd30A, nlgeom=NO
*Static
1., 1., 1e-05, 1.
**
** OUTPUT REQUESTS
**
*Restart, write, frequency=0
**
** FIELD OUTPUT: F-Output-1
**
*Output, field, variable=PRESELECT
**
** HISTORY OUTPUT: H-Output-1
**
*Output, history, variable=PRESELECT
*End Step
