*Heading
** Job name: FE_Mode2_crack2_dpd30_p10000_L60_plane_strain_fixy Model name: Model-1
** Generated by: Abaqus/CAE 2021
*Preprint, echo=NO, model=NO, history=NO, contact=NO
**
** PARTS
**
*Part, name=FE_Mode2_crack2_dpd30_p10000_L60
*Node
      1,   14.0525999,   14.0347004,  -6.74047518
      2,   14.0525999,  -14.0275002,  -6.74047518
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*Element, type=C3D8R
  1,  118,  601, 1505,  577,    1,   65,  513,   88
  2,  601,  602, 1506, 1505,   65,   66,  514,  513
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*Nset, nset=FE
    9,   10,   11,   12,   13,   14
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*Elset, elset=FE
  265,  266,  267,  268,  269,  270
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*Nset, nset=BD
    1,    2,    3,    4,    5,    6
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*Elset, elset=BD
  181,  182,  183,  184,  185,  186
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*Nset, nset=MD
    1,    2,    3,    4,    5,    6
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*Elset, elset=MD
   1,   2,   3,   4,   5,   6
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*Nset, nset=BOUN_1
    5,    6,    7,    8,    9,   12
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*Elset, elset=BOUN_1
  181,  185,  189,  193,  197,  201
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*Nset, nset=BOUN_2
    1,    2,    3,    4,   10,   11
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*Elset, elset=BOUN_2
  184,  188,  192,  196,  200,  204
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*Nset, nset=BOUN_3
   25,   26,   27,   28,   29,   30
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*Elset, elset=BOUN_3
  444,  448,  452,  456,  460,  464
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*Nset, nset=BOUN_4
   53,   54,   56,   57,   61,   62
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*Elset, elset=BOUN_4
 1085, 1086, 1087, 1088, 1101, 1102
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*Nset, nset=DSPL_1
   21,   22,   23,   24,   26,   28
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*Elset, elset=DSPL_1
  277,  278,  279,  280,  293,  294
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*Nset, nset=DSPL_2
   47,   48,   49,   50,   53,   54
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*Elset, elset=DSPL_2
  897,  898,  899,  900,  901,  902
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*End Part
**
**
** ASSEMBLY
**
*Assembly, name=Assembly
**
*Instance, name=FE_Mode2_crack2_dpd30_p10000_L60_1, part=FE_Mode2_crack2_dpd30_p10000_L60
*End Instance
**
*End Assembly
**
** BOUNDARY CONDITIONS
**
** Name: BOUN_1 Type: Displacement/Rotation
*Boundary
FE_Mode2_crack2_dpd30_p10000_L60_1.BOUN_1, 3, 3
** Name: BOUN_2 Type: Displacement/Rotation
*Boundary
FE_Mode2_crack2_dpd30_p10000_L60_1.BOUN_2, 3, 3
** Name: BOUN_3 Type: Displacement/Rotation
*Boundary
FE_Mode2_crack2_dpd30_p10000_L60_1.BOUN_3, 2, 2
** Name: BOUN_4 Type: Displacement/Rotation
*Boundary
FE_Mode2_crack2_dpd30_p10000_L60_1.BOUN_4, 2, 2
** ----------------------------------------------------------------
**
** STEP: FE_Mode2_crack2_dpd30_p10000_L60
**
*Step, name=FE_Mode2_crack2_dpd30_p10000_L60, nlgeom=NO
*Static
1., 1., 1e-05, 1.
**
** BOUNDARY CONDITIONS
**
** Name: DSPL_1 Type: Displacement/Rotation
*Boundary
FE_Mode2_crack2_dpd30_p10000_L60_1.DSPL_1, 1, 1, 30.
** Name: DSPL_2 Type: Displacement/Rotation
*Boundary
FE_Mode2_crack2_dpd30_p10000_L60_1.DSPL_2, 1, 1, -30.
**
** OUTPUT REQUESTS
**
*Restart, write, frequency=0
**
** FIELD OUTPUT: F-Output-1
**
*Output, field, variable=PRESELECT
**
** HISTORY OUTPUT: H-Output-1
**
*Output, history, variable=PRESELECT
*End Step
